*Heading
** Job name: Beam_No7001 Model name: Beam_No7001
** Generated by: Abaqus/CAE 2020
*Preprint, echo=NO, model=NO, history=NO, contact=NO
**
** PARTS
**
*Part, name=BEAM-1
*Node
      1,           0., -0.00106584001,           0.
      2, 0.0199999996, -0.000708687992,           0.
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*Element, type=S4R
  1,   1,  52,  53,   2
  2,   2,  53,  54,   3
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*Nset, nset=ALLNODES, generate
   1,  561,    1
*Elset, elset=ALLELES, generate
   1,  500,    1
*Nset, nset=LEFTBOUNDARY_NODE, generate
   1,  511,   51
*Nset, nset=RIGHTBOUNDARY_NODE, generate
  51,  561,   51
*Nset, nset=SET-LOADPOINT
 281,
*Nset, nset=UP_NODE, generate
  1,  51,   1
*Elset, elset=UPBOUNDARY_ELE, generate
  1,  50,   1
*Elset, elset=_UPBOUNDARY_SURF_E4, internal, generate
  1,  50,   1
*Surface, type=ELEMENT, name=UPBOUNDARY_SURF
_UPBOUNDARY_SURF_E4, E4
** Section: Section-1-ALLELES
*Shell Section, elset=ALLELES, material=PET, offset=SNEG, shell thickness=BEAM-1_ANALYTICAL-1
1., 5
*Distribution, name=BEAM-1_ANALYTICAL-1, location=ELEMENT, Table=BEAM-1_ANALYTICAL-1_Table
,     1.
1,  0.001
2,  0.001
3,  0.001
4,  0.001
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500,  0.001
*End Part
**
**
** ASSEMBLY
**
*Assembly, name=Assembly
**
*Instance, name=BEAM-1, part=BEAM-1
*End Instance
**
*End Assembly
**
** MATERIALS
**
*Material, name=PET
*Elastic
35000., 0.39
*Distribution Table, name=BEAM-1_ANALYTICAL-1_Table
length
** ----------------------------------------------------------------
**
** STEP: Step-1
**
*Step, name=Step-1, nlgeom=YES, inc=1000
*Static
0.01, 1., 1e-05, 1.
**
** BOUNDARY CONDITIONS
**
** Name: Disp-BC-1 Type: Displacement/Rotation
*Boundary
BEAM-1.LEFTBOUNDARY_NODE, 1, 1
** Name: Disp-BC-2 Type: Displacement/Rotation
*Boundary
BEAM-1.LEFTBOUNDARY_NODE, 2, 2
** Name: Disp-BC-3 Type: Displacement/Rotation
*Boundary
BEAM-1.LEFTBOUNDARY_NODE, 3, 3
** Name: Disp-BC-4 Type: Displacement/Rotation
*Boundary
BEAM-1.LEFTBOUNDARY_NODE, 4, 4
** Name: Disp-BC-5 Type: Displacement/Rotation
*Boundary
BEAM-1.LEFTBOUNDARY_NODE, 5, 5
** Name: Disp-BC-6 Type: Displacement/Rotation
*Boundary
BEAM-1.LEFTBOUNDARY_NODE, 6, 6
** Name: Disp-BC-7 Type: Displacement/Rotation
*Boundary
BEAM-1.RIGHTBOUNDARY_NODE, 1, 1
** Name: Disp-BC-8 Type: Displacement/Rotation
*Boundary
BEAM-1.RIGHTBOUNDARY_NODE, 2, 2
** Name: Disp-BC-9 Type: Displacement/Rotation
*Boundary
BEAM-1.RIGHTBOUNDARY_NODE, 3, 3
** Name: Disp-BC-10 Type: Displacement/Rotation
*Boundary
BEAM-1.RIGHTBOUNDARY_NODE, 4, 4
** Name: Disp-BC-11 Type: Displacement/Rotation
*Boundary
BEAM-1.RIGHTBOUNDARY_NODE, 5, 5
** Name: Disp-BC-12 Type: Displacement/Rotation
*Boundary
BEAM-1.RIGHTBOUNDARY_NODE, 6, 6
**
** LOADS
**
** Name: CFORCE-1   Type: Concentrated force
*Cload
BEAM-1.SET-LOADPOINT, 3, 0.001
**
** OUTPUT REQUESTS
**
*Restart, write, frequency=0
**
** FIELD OUTPUT: F-Output-3
**
*Output, field
*Contact Output
CDISP, CSTRESS
**
** FIELD OUTPUT: F-Output-1
**
*Node Output
COORD, U
**
** FIELD OUTPUT: F-Output-2
**
*Element Output, directions=YES
SE,
**
** HISTORY OUTPUT: H-Output-1
**
*Output, history, variable=PRESELECT
*End Step
** ----------------------------------------------------------------
**
** STEP: Step-2
**
*Step, name=Step-2, nlgeom=YES, inc=1000
*Static
0.01, 1., 1e-05, 1.
**
** BOUNDARY CONDITIONS
**
** Name: Disp-BC-1 Type: Displacement/Rotation
*Boundary, op=NEW
** Name: Disp-BC-2 Type: Displacement/Rotation
*Boundary, op=NEW
BEAM-1.LEFTBOUNDARY_NODE, 2, 2
** Name: Disp-BC-3 Type: Displacement/Rotation
*Boundary, op=NEW
BEAM-1.LEFTBOUNDARY_NODE, 3, 3
** Name: Disp-BC-4 Type: Displacement/Rotation
*Boundary, op=NEW
BEAM-1.LEFTBOUNDARY_NODE, 4, 4
** Name: Disp-BC-5 Type: Displacement/Rotation
*Boundary, op=NEW
BEAM-1.LEFTBOUNDARY_NODE, 5, 5
** Name: Disp-BC-6 Type: Displacement/Rotation
*Boundary, op=NEW
BEAM-1.LEFTBOUNDARY_NODE, 6, 6
** Name: Disp-BC-7 Type: Displacement/Rotation
*Boundary, op=NEW
** Name: Disp-BC-8 Type: Displacement/Rotation
*Boundary, op=NEW
BEAM-1.RIGHTBOUNDARY_NODE, 2, 2
** Name: Disp-BC-9 Type: Displacement/Rotation
*Boundary, op=NEW
BEAM-1.RIGHTBOUNDARY_NODE, 3, 3
** Name: Disp-BC-10 Type: Displacement/Rotation
*Boundary, op=NEW
BEAM-1.RIGHTBOUNDARY_NODE, 4, 4
** Name: Disp-BC-11 Type: Displacement/Rotation
*Boundary, op=NEW
BEAM-1.RIGHTBOUNDARY_NODE, 5, 5
** Name: Disp-BC-12 Type: Displacement/Rotation
*Boundary, op=NEW
BEAM-1.RIGHTBOUNDARY_NODE, 6, 6
** Name: Disp-BC-13 Type: Displacement/Rotation
*Boundary, op=NEW
BEAM-1.LEFTBOUNDARY_NODE, 1, 1, 0.005
** Name: Disp-BC-14 Type: Displacement/Rotation
*Boundary, op=NEW
BEAM-1.RIGHTBOUNDARY_NODE, 1, 1, -0.005
**
** OUTPUT REQUESTS
**
*Restart, write, frequency=0
**
** FIELD OUTPUT: F-Output-6
**
*Output, field
*Contact Output
CDISP, CSTRESS
**
** FIELD OUTPUT: F-Output-4
**
*Node Output
COORD, U
**
** FIELD OUTPUT: F-Output-5
**
*Element Output, directions=YES
SE,
**
** HISTORY OUTPUT: H-Output-2
**
*Output, history, variable=PRESELECT
*End Step
** ----------------------------------------------------------------
**
** STEP: Step-3
**
*Step, name=Step-3, nlgeom=YES, inc=1000
*Static
0.01, 1., 1e-05, 1.
**
** BOUNDARY CONDITIONS
**
** Name: Disp-BC-2 Type: Displacement/Rotation
*Boundary, op=NEW
** Name: Disp-BC-3 Type: Displacement/Rotation
*Boundary, op=NEW
** Name: Disp-BC-4 Type: Displacement/Rotation
*Boundary, op=NEW
** Name: Disp-BC-5 Type: Displacement/Rotation
*Boundary, op=NEW
** Name: Disp-BC-6 Type: Displacement/Rotation
*Boundary, op=NEW
** Name: Disp-BC-8 Type: Displacement/Rotation
*Boundary, op=NEW
** Name: Disp-BC-9 Type: Displacement/Rotation
*Boundary, op=NEW
** Name: Disp-BC-10 Type: Displacement/Rotation
*Boundary, op=NEW
** Name: Disp-BC-11 Type: Displacement/Rotation
*Boundary, op=NEW
** Name: Disp-BC-12 Type: Displacement/Rotation
*Boundary, op=NEW
** Name: Disp-BC-13 Type: Displacement/Rotation
*Boundary, op=NEW
** Name: Disp-BC-14 Type: Displacement/Rotation
*Boundary, op=NEW
** Name: Disp-BC-15 Type: Displacement/Rotation
*Boundary, op=NEW
BEAM-1.LEFTBOUNDARY_NODE, 1, 1, 0.1
** Name: Disp-BC-16 Type: Displacement/Rotation
*Boundary, op=NEW
BEAM-1.LEFTBOUNDARY_NODE, 2, 2
** Name: Disp-BC-17 Type: Displacement/Rotation
*Boundary, op=NEW
BEAM-1.LEFTBOUNDARY_NODE, 3, 3
** Name: Disp-BC-18 Type: Displacement/Rotation
*Boundary, op=NEW
BEAM-1.LEFTBOUNDARY_NODE, 4, 4
** Name: Disp-BC-19 Type: Displacement/Rotation
*Boundary, op=NEW
BEAM-1.LEFTBOUNDARY_NODE, 5, 5
** Name: Disp-BC-20 Type: Displacement/Rotation
*Boundary, op=NEW
BEAM-1.LEFTBOUNDARY_NODE, 6, 6
** Name: Disp-BC-21 Type: Displacement/Rotation
*Boundary, op=NEW
BEAM-1.RIGHTBOUNDARY_NODE, 1, 1, -0.1
** Name: Disp-BC-22 Type: Displacement/Rotation
*Boundary, op=NEW
BEAM-1.RIGHTBOUNDARY_NODE, 2, 2
** Name: Disp-BC-23 Type: Displacement/Rotation
*Boundary, op=NEW
BEAM-1.RIGHTBOUNDARY_NODE, 3, 3
** Name: Disp-BC-24 Type: Displacement/Rotation
*Boundary, op=NEW
BEAM-1.RIGHTBOUNDARY_NODE, 4, 4
** Name: Disp-BC-25 Type: Displacement/Rotation
*Boundary, op=NEW
BEAM-1.RIGHTBOUNDARY_NODE, 5, 5
** Name: Disp-BC-26 Type: Displacement/Rotation
*Boundary, op=NEW
BEAM-1.RIGHTBOUNDARY_NODE, 6, 6
**
** LOADS
**
** Name: CFORCE-1   Type: Concentrated force
*Cload, op=NEW
**
** OUTPUT REQUESTS
**
*Restart, write, frequency=0
**
** FIELD OUTPUT: F-Output-9
**
*Output, field
*Contact Output
CDISP, CSTRESS
**
** FIELD OUTPUT: F-Output-7
**
*Node Output
COORD, U
**
** FIELD OUTPUT: F-Output-8
**
*Element Output, directions=YES
SE,
**
** HISTORY OUTPUT: H-Output-3
**
*Output, history, variable=PRESELECT
*End Step
** ----------------------------------------------------------------
**
** STEP: Step-4
**
*Step, name=Step-4, nlgeom=YES, inc=1000
*Static
0.01, 1., 1e-05, 1.
**
** BOUNDARY CONDITIONS
**
** Name: Disp-BC-15 Type: Displacement/Rotation
*Boundary, op=NEW
** Name: Disp-BC-16 Type: Displacement/Rotation
*Boundary, op=NEW
BEAM-1.LEFTBOUNDARY_NODE, 2, 2
** Name: Disp-BC-17 Type: Displacement/Rotation
*Boundary, op=NEW
BEAM-1.LEFTBOUNDARY_NODE, 3, 3
** Name: Disp-BC-18 Type: Displacement/Rotation
*Boundary, op=NEW
BEAM-1.LEFTBOUNDARY_NODE, 4, 4
** Name: Disp-BC-19 Type: Displacement/Rotation
*Boundary, op=NEW
BEAM-1.LEFTBOUNDARY_NODE, 5, 5
** Name: Disp-BC-20 Type: Displacement/Rotation
*Boundary, op=NEW
BEAM-1.LEFTBOUNDARY_NODE, 6, 6
** Name: Disp-BC-21 Type: Displacement/Rotation
*Boundary, op=NEW
** Name: Disp-BC-22 Type: Displacement/Rotation
*Boundary, op=NEW
BEAM-1.RIGHTBOUNDARY_NODE, 2, 2
** Name: Disp-BC-23 Type: Displacement/Rotation
*Boundary, op=NEW
BEAM-1.RIGHTBOUNDARY_NODE, 3, 3
** Name: Disp-BC-24 Type: Displacement/Rotation
*Boundary, op=NEW
BEAM-1.RIGHTBOUNDARY_NODE, 4, 4
** Name: Disp-BC-25 Type: Displacement/Rotation
*Boundary, op=NEW
BEAM-1.RIGHTBOUNDARY_NODE, 5, 5
** Name: Disp-BC-26 Type: Displacement/Rotation
*Boundary, op=NEW
BEAM-1.RIGHTBOUNDARY_NODE, 6, 6
** Name: Disp-BC-27 Type: Displacement/Rotation
*Boundary, op=NEW
BEAM-1.LEFTBOUNDARY_NODE, 1, 1, 0.063996
** Name: Disp-BC-28 Type: Displacement/Rotation
*Boundary, op=NEW
BEAM-1.RIGHTBOUNDARY_NODE, 1, 1, -0.063996
**
** OUTPUT REQUESTS
**
*Restart, write, frequency=0
**
** FIELD OUTPUT: F-Output-12
**
*Output, field
*Contact Output
CDISP, CSTRESS
**
** FIELD OUTPUT: F-Output-10
**
*Node Output
COORD, U
**
** FIELD OUTPUT: F-Output-11
**
*Element Output, directions=YES
SE,
**
** HISTORY OUTPUT: H-Output-4
**
*Output, history, variable=PRESELECT
*End Step
